# Программа оценивания модели нестационарной регрессии с отбором существенных регрессоров
# Критерий имеет вид:
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# Решение задачи:
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# Процедура динамического программирования
# Исходные данные:
# Длина сигналов:
N := 50
# Количество сигналов:
n := 20
# Количество стационарных коэффициентов:
n1 := 0
# Количество нулевых коэффициентов:
n2 := 15
# Количество нестационарных коэффициентов:
n3 := n - n1 - n2
ρ := 1/100000
# [area: Формирование исходных данных]
# Генерирование стационарных коэффициентов:
i := 0 .. n1 - 1
a_hidden[i, 0] := 1 + rnd(9)  # disabled
a_hidden[i, 0] := 1
t := 1 .. N - 1
a_hidden[i, t] := a_hidden[i, 0]
# Генерирование нулевых коэффициентов:
i := n1 .. n1 + n2 - 1
a_hidden[i, 0] := 0
t := 1 .. N - 1
a_hidden[i, t] := a_hidden[i, 0]
# Генерирование нестационарных коэффициентов:
i := n1 + n2 .. n - 1
α[i] := rnd(π)
t := 0 .. N - 1
a_hidden[i, t] := sin(t/N*π + α[i])
# [component: outputs i]
i =  # no stored result
i := 99  # disabled
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# Генерирование регрессоров:
i := 0 .. n - 1
t := 0 .. N - 1
x[i, t] := rnorm(1, 0, 1)[0]
# Дисперсия шума наблюдения:
# Наблюдаемая переменная:
t := 0 .. N - 1
ε := 0.1*□
k := 1
y[t] := sum(x[i, t]*a_hidden[i, t], i = 0 .. n - 1) + k*rnorm(1, 0, ε)[0]
# [component: outputs use_equal_constraint]
# [area: Процедура динамического программирования]
# Парносепарабельный критерий:
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# Прямой ход процедуры:
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NonZeroPartInverse(M) :=
    sled ← 1
    det ← |M|
    if |det| > 10^20
        M ← 1/det*M
        M_1 ← 1/det*M^-1
    M_1 ← M^-1 otherwise
    M_1  # disabled
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# Обратный ход процедуры:
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# Вычисление оптимальных значений:
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NonZeroPartInverse(M) :=
    k ← 0
    level ← 10^10
    for i ∈ 0 .. rows(M) - 1
        if |M[i, i]| < level
            ind[k] ← i
            k ← k + 1
    for i ∈ 0 .. k - 1
        for j ∈ 0 .. k - 1
            M_part[i, j] ← M[ind[i], ind[j]]
    M_part ← M_part^-1
    for i ∈ 0 .. rows(M) - 1
        for j ∈ 0 .. rows(M) - 1
            M_1[i, j] ← 0
    for i ∈ 0 .. k - 1
        for j ∈ 0 .. k - 1
            M_1[ind[i], ind[j]] ← M_part[i, j]
    M_1
Dynamic_Programming(λ, r, x, y, n, N, μ, use_equal_constraint) :=
    if use_equal_constraint
        for i ∈ 0 .. n - 2
            for j ∈ 0 .. n - 2
                Delta[i, j] ← 1/r[n - 1]
                U[i, j] ← 1/(λ[n - 1]*r[n - 1])
            Delta[i, i] ← 1/r[i] + 1/r[n - 1]
            U[i, i] ← 1/(λ[i]*r[i]) + 1/(r[n - 1]*λ[n - 1])
            δn[i] ← 1/r[n - 1]
        for t ∈ 0 .. N - 1
            for i ∈ 0 .. n - 2
                z[i] ← x[:, t][i] - x[:, t][n - 1]
            υ[t] ← y[t] - x[:, t][n - 1]
            Q0[t] ← z*transpose(z) + Delta if t == 0
            Q0[t] ← z*transpose(z) otherwise
            a0[t] ← υ[t]*z
            a0[t] ← a0[t] + δn
            V[t] ← identity(n - 1)
            V_1[t] ← identity(n - 1)
    otherwise
        for i ∈ 0 .. n - 1
            Delta[i, i] ← 1/r[i]
            U[i, i] ← 1/(λ[i]*r[i])
            U_1[i, i] ← λ[i]*r[i]/1
        for t ∈ 0 .. N - 1
            Q0[t] ← x[:, t]*transpose(x[:, t]) + Delta if t == 0
            Q0[t] ← x[:, t]*transpose(x[:, t]) otherwise
            a0[t] ← y[t]*x[:, t]
            V[t] ← identity(n)
            V_1[t] ← identity(n)
    QB_left[0] ← Q0[0]
    aB_left[0] ← a0[0]
    for t ∈ 1 .. N - 1
        Qtemp ← U*V[t]*(QB_left[t - 1] + V[t]*U*V[t])^-1
        trace("left t={0}", t)
        QB_left[t] ← Q0[t] + Qtemp*QB_left[t - 1]*V_1[t]
        aB_left[t] ← a0[t] + Qtemp*aB_left[t - 1]
    QB_right[N - 1] ← Q0[N - 1]
    aB_right[N - 1] ← a0[N - 1]
    for t ∈ N - 2 .. 0
        Qtemp ← V[t + 1]*U*(QB_right[t + 1] + U)^-1
        trace("right t={0}", t)
        QB_right[t] ← Q0[t] + Qtemp*QB_right[t + 1]*V[t + 1]
        aB_right[t] ← a0[t] + Qtemp*aB_right[t + 1]
    for t ∈ 0 .. N - 1
        trace("margin t={0}", t)
        Q[t] ← QB_right[t] + QB_left[t] - Q0[t]
        Q_jk[t] ← QB_right[t] + QB_left[t] - 2*Q0[t]
        a[t] ← Q[t]^-1*(aB_left[t] + aB_right[t] - a0[t])
        a_jk[t] ← Q_jk[t]^-1*(aB_left[t] + aB_right[t] - 2*a0[t]) if t > 0
        a_jk[t] ← a[t] otherwise
    if use_equal_constraint
        for t ∈ 0 .. N - 1
            sum ← 0
            for i ∈ 0 .. n - 2
                sum ← sum + a[t][i]
            a[t][n - 1, 0] ← 1 - sum
            sum ← 0
            for i ∈ 0 .. n - 2
                sum ← sum + a_jk[t][i]
            a_jk[t][n - 1, 0] ← 1 - sum
    [a; Q; a_jk; QB_right]
Scale_lambda(x, n, N) :=
    for i ∈ 0 .. n - 1
        λ[i] ← 0
        for t ∈ 0 .. N - 1
            λ[i] ← λ[i] + x[i, t]^2
        λ[i] ← N/sqrt(λ[i])
    λ
for i ∈ 0 .. n - 1
    V[t][i, i] ← (1 + x[i, t])/(1 + y[t])
    V_1[t][i, i] ← (1 + y[t])/(1 + x[i, t])
NonZeroPartInverse([2, 1; 1, 2*10^-26]) =  # no stored result
a_jk[t] ← Q_jk[t]^-1*(aB_left[t] + aB_right[t] - 2*a0[t])
Lambda_Delta_optimizer(λ0, δ0, x, y, n, N, ρ, η, use_equal_constraint) :=
    max ← 1
    k ← 0
    l ← 0
    for i ∈ 0 .. n - 1
        λ[i, k] ← λ0[i]
        δ[i, k] ← δ0[i]
    while k < 100 and min(δ[:, k]) > 10^-9
        max ← 0
        DP ← Dynamic_Programming(λ0, δ[:, k], x, y, n, N, ρ, η, use_equal_constraint)
        a ← DP[0]
        a_jk ← DP[2]
        J[l] ← sum((y[t] - sum(x[i, t]*a[t][i, 0], i = 0 .. n - 1))^2, t = 0 .. N - 1) + ρ*sum(1/δ[i, k]*a[0][i, 0]^2, i = 0 .. n - 1) + ρ*sum(1/(λ0[i]*δ[i, k])*sum((a[t][i, 0] - (1 + x[i, t])/(1 + y[t])*a[t - 1][i, 0])^2, t = 1 .. N - 1), i = 0 .. n - 1)
        μ ← nthroot(product(a[0][i, 0]^2 + 1/λ0[i]*sum((a[t][i, 0] - (1 + x[i, t])/(1 + y[t])*a[t - 1][i, 0])^2, t = 1 .. N - 1), i = 0 .. n - 1), n)
        l ← l + 1
        k ← k + 1
        for i ∈ 0 .. n - 1
            δ[i, k] ← (a[0][i, 0]^2 + 1/λ0[i]*sum((a[t][i, 0] - (1 + x[i, t])/(1 + y[t])*a[t - 1][i, 0])^2, t = 1 .. N - 1))/μ
            max ← |δ[i, k] - δ[i, k - 1]| if max < |δ[i, k] - δ[i, k - 1]|
        J[l] ← sum((y[t] - sum(x[i, t]*a[t][i, 0], i = 0 .. n - 1))^2, t = 0 .. N - 1) + ρ*sum(1/δ[i, k]*a[0][i, 0]^2, i = 0 .. n - 1) + ρ*sum(1/(λ0[i]*δ[i, k])*sum((a[t][i, 0] - (1 + x[i, t])/(1 + y[t])*a[t - 1][i, 0])^2, t = 1 .. N - 1), i = 0 .. n - 1)
        l ← l + 1
        pR2[k] ← 1 - sum((y[t] - sum(a_jk[t][i, 0]*x[i, t], i = 0 .. n - 1))^2, t = 1 .. N - 1)/sum(y[t]^2, t = 1 .. N - 1)
        pr[k] ← sum((y[t] - sum(a_jk[t][i, 0]*x[i, t], i = 0 .. n - 1))^2, t = 1 .. N - 1)
        r[k] ← sum((y[t] - sum(a[t][i, 0]*x[i, t], i = 0 .. n - 1))^2, t = 1 .. N - 1)
        r2[k] ← 1 - sum((y[t] - sum(a[t][i, 0]*x[i, t], i = 0 .. n - 1))^2, t = 1 .. N - 1)/sum(y[t]^2, t = 1 .. N - 1)
    [a; λ; δ; k; J; pR2; pr; r; r2; a_jk]  # disabled
Lambda_Delta_optimizer(λ0, r0, x, y, n, N, μ, use_equal_constraint) :=
    max ← 1
    k ← 0
    l ← 0
    for i ∈ 0 .. n - 1
        λ[i] ← λ0[i]
        r[i, k] ← r0[i]
    while (k < 100 and min(r[:, k]) > 10^-12) and max > 10^-10
        max ← 0
        DP ← Dynamic_Programming(λ0, x, y, n, N, μ, use_equal_constraint)
        a ← DP[0]
        a_jk ← DP[2]
        J[l] ← sum((y[t] - sum(x[i, t]*a[t][i, 0], i = 0 .. n - 1))^2, t = 0 .. N - 1) + sum(1/r[i, k]*a[0][i, 0]^2, i = 0 .. n - 1) + sum(1/(r[i, k]*λ[i])*sum((a[t][i, 0] - a[t - 1][i, 0])^2, t = 1 .. N - 1) + 1/(r[i, k]*μ), i = 0 .. n - 1)
        η ← nthroot(product(a[0][i, 0]^2 + 1/λ[i]*sum((a[t][i, 0] - a[t - 1][i, 0])^2, t = 1 .. N - 1) + 1/μ, i = 0 .. n - 1), n)
        l ← l + 1
        k ← k + 1
        for i ∈ 0 .. n - 1
            r[i, k] ← (a[0][i, 0]^2 + 1/λ[i]*sum((a[t][i, 0] - a[t - 1][i, 0])^2, t = 1 .. N - 1) + 1/μ)/η
            max ← |r[i, k] - r[i, k - 1]| if max < |r[i, k] - r[i, k - 1]|
        J[l] ← sum((y[t] - sum(x[i, t]*a[t][i, 0], i = 0 .. n - 1))^2, t = 0 .. N - 1) + sum(1/r[i, k]*a[0][i, 0]^2, i = 0 .. n - 1) + sum(1/(r[i, k]*λ[i])*sum((a[t][i, 0] - a[t - 1][i, 0])^2, t = 1 .. N - 1) + 1/(r[i, k]*μ), i = 0 .. n - 1)
        l ← l + 1
        pR2[k] ← 1 - sum((y[t] - sum(a_jk[t][i, 0]*x[i, t], i = 0 .. n - 1))^2, t = 1 .. N - 1)/sum(y[t]^2, t = 1 .. N - 1)
        pr[k] ← sum((y[t] - sum(a_jk[t][i, 0]*x[i, t], i = 0 .. n - 1))^2, t = 1 .. N - 1)
        er[k] ← sum((y[t] - sum(a[t][i, 0]*x[i, t], i = 0 .. n - 1))^2, t = 1 .. N - 1)
        r2[k] ← 1 - sum((y[t] - sum(a[t][i, 0]*x[i, t], i = 0 .. n - 1))^2, t = 1 .. N - 1)/sum(y[t]^2, t = 1 .. N - 1)
    [a; λ; r; k; J; pR2; pr; er; r2; a_jk]
Lambda_Delta_optimizer(λ0, r0, x, y, n, N, μ, use_equal_constraint) :=
    max ← 1
    k ← 0
    l ← 0
    for i ∈ 0 .. n - 1
        λ[i] ← λ0[i]
        r[i, k] ← r0[i]
    while (k < 100 and min(r[:, k]) > 10^-12) and max > 10^-10
        max ← 0
        DP ← Dynamic_Programming(λ0, r[:, k], x, y, n, N, μ, use_equal_constraint)
        a ← DP[0]
        a_jk ← DP[2]
        J[l] ← sum((y[t] - sum(x[i, t]*a[t][i, 0], i = 0 .. n - 1))^2, t = 0 .. N - 1) + sum(1/r[i, k]*sum(a[t][i, 0]^2, t = 0 .. N - 1), i = 0 .. n - 1) + sum(1/(r[i, k]*λ[i])*sum((a[t][i, 0] - a[t - 1][i, 0])^2, t = 1 .. N - 1), i = 0 .. n - 1)
        η ← nthroot(product(sum(a[t][i, 0]^2, t = 1 .. N - 1) + 1/λ[i]*sum((a[t][i, 0] - a[t - 1][i, 0])^2, t = 1 .. N - 1), i = 0 .. n - 1), n)
        l ← l + 1
        k ← k + 1
        for i ∈ 0 .. n - 1
            r[i, k] ← (sum(a[t][i, 0]^2, t = 1 .. N - 1) + 1/λ[i]*sum((a[t][i, 0] - a[t - 1][i, 0])^2, t = 1 .. N - 1))/η
            max ← |r[i, k] - r[i, k - 1]| if max < |r[i, k] - r[i, k - 1]|
        J[l] ← sum((y[t] - sum(x[i, t]*a[t][i, 0], i = 0 .. n - 1))^2, t = 0 .. N - 1) + sum(1/r[i, k]*sum(a[t][i, 0]^2, t = 0 .. N - 1), i = 0 .. n - 1) + sum(1/(r[i, k]*λ[i])*sum((a[t][i, 0] - a[t - 1][i, 0])^2, t = 1 .. N - 1), i = 0 .. n - 1)
        l ← l + 1
        pR2[k] ← 1 - sum((y[t] - sum(a_jk[t][i, 0]*x[i, t], i = 0 .. n - 1))^2, t = 1 .. N - 1)/sum(y[t]^2, t = 1 .. N - 1)
        pr[k] ← sum((y[t] - sum(a_jk[t][i, 0]*x[i, t], i = 0 .. n - 1))^2, t = 1 .. N - 1)
        er[k] ← sum((y[t] - sum(a[t][i, 0]*x[i, t], i = 0 .. n - 1))^2, t = 1 .. N - 1)
        r2[k] ← 1 - sum((y[t] - sum(a[t][i, 0]*x[i, t], i = 0 .. n - 1))^2, t = 1 .. N - 1)/sum(y[t]^2, t = 1 .. N - 1)
    [a; λ; r; k; J; pR2; pr; er; r2; a_jk]  # disabled
# Проверка:
i := 0 .. n - 1
r[i] := 1
λ[i] := 1
μ := 100
DP := Dynamic_Programming(λ, r, x, y, n, N, μ, use_equal_constraint)
a := DP[0]
# [component: outputs i]
i =  # no stored result
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# Оценка ро:
ρ := sum((y[t] - sum(a[t][i, 0]*x[i, t], i = 0 .. n - 1))^2, t = 0 .. N - 1)/(2*N)
ρ =  # no stored result
i := 0 .. n - 1
r[i] := 1
λ[i] := 10
# Подсчет ошибки на скользящем контроле:
a_jk := DP[2]
R2 := 1 - sum((y[t] - sum(a_jk[t][i, 0]*x[i, t], i = 0 .. n - 1))^2, t = 0 .. N - 1)/sum(y[t]^2, t = 0 .. N - 1)
R2 =  # no stored result
μ := 1*10^10
i := 0 .. n - 1  # μ0
λ[i] := 1
λ := Scale_lambda(x, n, N)*lam  # disabled
λ =  # no stored result
# Итерационная процедура оценивания:
LD := Lambda_Delta_optimizer(λ, r, x, y, n, N, μ, use_equal_constraint)
a := LD[0]
a_jk := LD[9]
# Значение критерия по итерациям:
J := LD[4]
transpose(J) =  # no stored result
# Значение показателя R2 по итерациям:
Rsq := LD[5]
transpose(Rsq) =  # no stored result
pR2 := LD[6]
transpose(pR2) =  # no stored result
R2 := LD[7]
transpose(R2) =  # no stored result
# Изменение лямбд дельт по итерациям:
λM := LD[1]
rM := LD[2]
λM
rM =  # no stored result
t := 1 .. N - 1
y_r2[t] := sum(a_jk[t][i, 0]*x[i, t], i = 0 .. n - 1)  # disabled
y_r2[t] := sum(a[t][i, 0]*x[i, t], i = 0 .. n - 1)
# [component: outputs i]
LTCM[0, i + 2] =  # no stored result
i =  # no stored result
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i := 0 .. n - 1
s[i] := sum(a[t][i, 0]^2, t = 1 .. N - 1)
i := 0 .. n - 1
bet[i, 0] := i
bet[i, 1] := s[i]/max(s)
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reverse(csort(bet, 1)) =  # no stored result
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max(disp)
i := 0 .. n - 1
a_save[i + 1, 0] := LTCM[0, i + 2]
disp[i, 0] := LTCM[0, i + 2]
t := 0 .. N - 1
a_save[0, t + 1] := LTCM[t + 1, 0]
i := 0 .. n - 1
t := 0 .. N - 1
a_save[i + 1, t + 1] := a[t][i, 0]
disp[i, 1] := rM[i, cols(rM) - 1]/max(rM[:, cols(rM) - 1])
reverse(csort(disp, 1)) =  # no stored result
# [component: inputs a_save]
a_jk := DP[2]
# [component: inputs reverse(csort(bet, 1))]
i := 0 .. n - 1
r[i] := 1
# Подбор лямбд и мю:
max_num_lam := 10
max_num_mu := 10
lam[0] := 0.001
mu[0] := 10
j := 1 .. max_num_mu
k := 1 .. max_num_lam
mu[j] := mu[j - 1]*10
lam[k] := lam[k - 1]*10
k := 0 .. max_num_lam - 1
i := 0 .. n - 1
Lambda[i, k] := lam[k]
k := 0 .. max_num_lam - 1
j := 0 .. max_num_mu - 1
LD[k, j] := Lambda_Delta_optimizer(Lambda[:, k], r, x, y, n, N, mu[j], use_equal_constraint)
pRsq[k, j] := LD[k, j][5][LD[k, j][3]]
pR2[k, j] := LD[k, j][6][LD[k, j][3]]
Rsq[k, j] := LD[k, j][8][LD[k, j][3]]
Lambda
R2[k, j] := LD[k, j][7][LD[k, j][3]]
pRsq =  # no stored result
pR2 =  # no stored result
k := 0 .. max_num_mu - 1
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mu =  # no stored result
k := 0 .. max_num_lam - 1
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R2 =  # no stored result
Rsq =  # no stored result
# [component: inputs pRsq]
# [component: inputs pRsq]
search_max_lambda(r2, lam, mu) :=
    max ← r2[0, 0]
    max_i ← 0
    max_j ← 0
    for i ∈ 0 .. rows(r2) - 1
        for j ∈ 0 .. cols(r2) - 1
            if max < r2[i, j]
                max ← r2[i, j]
                max_i ← i
                max_j ← j
    [max; lam[1, max_i]; mu[max_j]]
search_max_lambda(pRsq, Lambda, mu) =  # no stored result
# Ошибка
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